*Heading
** Job name: Job-3-STIFF-Single Model name: Model-Single
** Generated by: Abaqus/CAE 2022
*Preprint, echo=NO, model=NO, history=NO, contact=NO
**
** PARTS
**
*Part, name=Part-cell
*Node
      1,           0.,           0.,           0.
      2,           0.,           0.,         12.5
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*Element, type=C3D4
   1,  729,  730,  731,  732
   2,  729,  733,  734,  735
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*Nset, nset=Set-4, generate
    1,  1818,     1
*Elset, elset=Set-4, generate
    1,  8577,     1
** Section: Section-cell
*Solid Section, elset=Set-4, material=Material-cell
,
*End Part
**
*Part, name=Part-matrixvoid
*Node
      1,           0.,         13.5,         13.5
      2,           0.,           0.,         13.5
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*Element, type=C3D8
 1,  8,  5, 76, 77,  1,  2, 23, 58
 2, 77, 76, 75, 78, 58, 23, 24, 57
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*Element, type=C3D4
8000, 9576, 9577, 2935, 2936
8001, 9576, 2935, 2952, 2953
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*Nset, nset=Set-1, generate
    1,  9625,     1
*Elset, elset=Set-1, generate
    1,  9053,     1
** Section: Section-matrix
*Solid Section, elset=Set-1, material=Material-matrix
,
*End Part
**
**
** ASSEMBLY
**
*Assembly, name=Assembly
**
*Instance, name=Part-cell-1, part=Part-cell
*End Instance
**
*Instance, name=Part-matrixvoid-1, part=Part-matrixvoid
*End Instance
**
*Nset, nset=Set-5, instance=Part-cell-1, generate
 1,  4,  1
*Nset, nset=Set-9, instance=Part-cell-1
 1,
*Nset, nset=Set-18, instance=Part-cell-1, generate
    1,  1818,     1
*Elset, elset=Set-18, instance=Part-cell-1, generate
    1,  8577,     1
*Nset, nset=Set-19, instance=Part-cell-1, generate
    1,  1818,     1
*Elset, elset=Set-19, instance=Part-cell-1, generate
    1,  8577,     1
*Nset, nset=Set-20, instance=Part-cell-1
   1,   2,   3,   5,   6,   7
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*Elset, elset=Set-20, instance=Part-cell-1
   51,   53,   85,  137,  183,  277
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*Nset, nset=Set-21, instance=Part-cell-1
   1,   3,   4,  36,  37,  38
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*Elset, elset=Set-21, instance=Part-cell-1
   53,  244,  261,  345,  360,  363
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*Nset, nset=Set-22, instance=Part-cell-1
   1,   2,   4,   5,   6,   7
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*Elset, elset=Set-22, instance=Part-cell-1
  137,  419,  620,  672,  770,  865
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*Nset, nset=Set-23, instance=Part-matrixvoid-1
   16,   17,   18,   19,  223,  224
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*Elset, elset=Set-23, instance=Part-matrixvoid-1
  760,  761,  762,  763,  764,  765
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*Nset, nset=Set-24, instance=Part-cell-1
   1,   2,   3,   5,   6,   7
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*Nset, nset=Set-24, instance=Part-matrixvoid-1
    1,    2,    3,    4,    9,   10
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*Nset, nset=Set-25, instance=Part-cell-1
   1,   3,   4,  36,  37,  38
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*Nset, nset=Set-25, instance=Part-matrixvoid-1
    9,   11,   13,   14,   15,   16
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*Nset, nset=Set-26, instance=Part-cell-1
   1,   2,   4,   5,   6,   7
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*Nset, nset=Set-26, instance=Part-matrixvoid-1
    2,    3,    5,    6,   15,   16
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*Elset, elset=_m_Surf-10_S3, internal, instance=Part-matrixvoid-1
 8001, 8020, 8021, 8029, 8045, 8046
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*Elset, elset=_m_Surf-10_S1, internal, instance=Part-matrixvoid-1
 8012, 8032, 8072, 8097, 8102, 8112
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*Elset, elset=_m_Surf-10_S4, internal, instance=Part-matrixvoid-1
 8023, 8043, 8048, 8073, 8114, 8130
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*Elset, elset=_m_Surf-10_S2, internal, instance=Part-matrixvoid-1
 8226, 8297, 8357, 8418, 8431, 8445
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*Surface, type=ELEMENT, name=m_Surf-10
_m_Surf-10_S3, S3
_m_Surf-10_S1, S1
_m_Surf-10_S4, S4
_m_Surf-10_S2, S2
*Elset, elset=_s_Surf-10_S3, internal, instance=Part-cell-1
   37,  132,  158,  222,  243,  244
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*Elset, elset=_s_Surf-10_S4, internal, instance=Part-cell-1
   53, 1745, 1864, 1881, 2037, 2275
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*Elset, elset=_s_Surf-10_S2, internal, instance=Part-cell-1
  178, 1660, 1938, 2090, 2257, 2500
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*Elset, elset=_s_Surf-10_S1, internal, instance=Part-cell-1
 1639, 1739, 1797, 1815, 2234, 2235
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*Surface, type=ELEMENT, name=s_Surf-10
_s_Surf-10_S3, S3
_s_Surf-10_S4, S4
_s_Surf-10_S2, S2
_s_Surf-10_S1, S1
** Constraint: Constraint-1
*Tie, name=Constraint-1, adjust=yes
s_Surf-10, m_Surf-10
*End Assembly
**
** MATERIALS
**
*Material, name=Material-cell
*Depvar
     80,
*User Material, constants=15
1.,   8.,   8.,  0.4,  0.4,   2.,   2.,  0.3
  0.3, 16.5,   4.,  0.3,  0.3,   1.,  0.3
*Material, name=Material-cellelastic
*Elastic
20., 0.3
*Expansion
 -0.2,
*Material, name=Material-matrix
*Depvar
     80,
*User Material, constants=15
2.,  0.,  0.,  0.,  0.,  0.,  0.,  0.
  0.,  0.,  4., 0.3,  0.,  0.,  0.
*Material, name=Material-matrixelastic
*Elastic
 0.1, 0.3
**
** BOUNDARY CONDITIONS
**
** Name: BC-Xsym Type: Symmetry/Antisymmetry/Encastre
*Boundary
Set-24, XSYMM
** Name: BC-Ysym Type: Symmetry/Antisymmetry/Encastre
*Boundary
Set-26, YSYMM
** Name: BC-Zsym Type: Symmetry/Antisymmetry/Encastre
*Boundary
Set-25, ZSYMM
** Name: BC-fixmatrix Type: Symmetry/Antisymmetry/Encastre
*Boundary
Set-23, ENCASTRE
** ----------------------------------------------------------------
**
** STEP: Step-1
**
*Step, name=Step-1, nlgeom=NO, inc=100000
*Static
0.1, 1., 1e-05, 0.1
**
** PREDEFINED FIELDS
**
** Name: Predefined Field-1   Type: Temperature
*Temperature
Set-19, 1.
**
** OUTPUT REQUESTS
**
*Restart, write, frequency=0
**
** FIELD OUTPUT: F-Output-1
**
*Output, field
*Node Output
CF, RF, U
*Element Output, directions=YES
LE, PE, PEEQ, PEMAG, S, SDV
*Contact Output
CDISP, CSTRESS
**
** HISTORY OUTPUT: H-Output-1
**
*Output, history, variable=PRESELECT
*End Step
