*Heading
** Job name: Job-1-STIFF-PushingCluster Model name: Model-Pushingcluster
** Generated by: Abaqus/CAE 2022
*Preprint, echo=NO, model=NO, history=NO, contact=NO
**
** PARTS
**
*Part, name=Part-matrixvoid
*Node
      1,         200.,        -200.,         200.
      2,        -200.,        -200.,         200.
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*Element, type=C3D4
     1,  9642,  9643,  9644,  9645
     2,  9646,  9643,  9647,  9642
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*Nset, nset=Set-1, generate
     1,  55670,      1
*Elset, elset=Set-1, generate
      1,  306655,       1
** Section: Section-matrix
*Solid Section, elset=Set-1, material=Material-matrix
,
*End Part
**
**
** ASSEMBLY
**
*Assembly, name=Assembly
**
*Instance, name=Part-matrixvoid-1, part=Part-matrixvoid
*End Instance
**
*Nset, nset=Set-29, instance=Part-matrixvoid-1
    1,    2,    3,    4,    5,    6
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*Elset, elset=Set-29, instance=Part-matrixvoid-1
     15,     72,    114,    137,    141,    206
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*Nset, nset=Set-35, instance=Part-matrixvoid-1
    1,    2,    3,    4,    5,    6
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*Elset, elset=Set-35, instance=Part-matrixvoid-1
     15,     72,    114,    137,    141,    206
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*Nset, nset=Set-36, instance=Part-matrixvoid-1
    9,   10,  479,  480,  481, 9608
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*Elset, elset=Set-36, instance=Part-matrixvoid-1
     39,     69,    178,    449,    515,    849
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*Nset, nset="_T-Datum csys-3", internal
Set-36,
*Transform, nset="_T-Datum csys-3", type=S
          0.,           0.,           0.,           0.,           0.,           1.
*End Assembly
**
** MATERIALS
**
*Material, name=Material-cell
*Depvar
     80,
*User Material, constants=15
1.,   1.,   5.,  0.4,  0.4,   3.,  16.,  2.8
 15.8,   1.,  0.3,   1.,  0.3,   1.,  0.3
*Material, name=Material-cellelastic
*Elastic
20., 0.3
*Expansion
 -0.2,
*Material, name=Material-matrix
*Depvar
     80,
*User Material, constants=15
2.,  0.,  0.,  0.,  0.,  0.,  0.,  0.
  0.,  0.,  4., 0.3,  0.,  0.,  0.
*Material, name=Material-matrixelastic
*Elastic
 0.1, 0.3
**
** BOUNDARY CONDITIONS
**
** Name: BC-fixmatrix Type: Symmetry/Antisymmetry/Encastre
*Boundary
Set-35, ENCASTRE
** ----------------------------------------------------------------
**
** STEP: Step-1
**
*Step, name=Step-1, nlgeom=NO, inc=100000
*Static
0.1, 1., 1e-05, 0.1
**
** BOUNDARY CONDITIONS
**
** Name: BC-Pushing Type: Displacement/Rotation
*Boundary
Set-36, 1, 1, 8.5725
Set-36, 2, 2
Set-36, 3, 3
**
** OUTPUT REQUESTS
**
*Restart, write, frequency=0
**
** FIELD OUTPUT: F-Output-1
**
*Output, field
*Node Output
CF, RF, U
*Element Output, directions=YES
LE, PE, PEEQ, PEMAG, S, SDV
*Contact Output
CDISP, CSTRESS
**
** HISTORY OUTPUT: H-Output-1
**
*Output, history, variable=PRESELECT
*End Step
